// SBML level 2 version 4
// dcterms:bibliographicCitation: http://identifiers.org/pubmed/21391741
// dcterms:bibliographicCitation: http://identifiers.org/pubmed/28367561

function Function_for_Raf1_dephosphorylation__pAkt_modifier__1(Kcat10b, Km10b, pAkt, pRaf1)
  Kcat10b*pAkt*pRaf1/(pRaf1 + Km10b);
end
Function_for_Raf1_dephosphorylation__pAkt_modifier__1 is "Function for Raf1 dephosphorylation (pAkt modifier)_1";

function Function_for_MEK_phosphorylation__pRaf1__pRKIP_and_RKIP_modifiers__1(MEK, RKIP, k11b1, k11b2, pRKIP, pRaf1)
  k11b1*pRaf1*MEK/(1 + ((RKIP - pRKIP)/k11b2)^2);
end
Function_for_MEK_phosphorylation__pRaf1__pRKIP_and_RKIP_modifiers__1 is "Function for MEK phosphorylation (pRaf1, pRKIP and RKIP modifiers)_1";

function Function_for_ERK_phosphorylation__pMEK_modifier__1(ERK, Kcat13, Km13, pMEK)
  Kcat13*pMEK*ERK/(ERK + Km13);
end
Function_for_ERK_phosphorylation__pMEK_modifier__1 is "Function for ERK phosphorylation (pMEK modifier)_1";

function Function_for_Raf1_dephosphorylation__RafPPtase_modifier__1(Kcat10a, Km10a, RafPPtase, pRaf1)
  Kcat10a*RafPPtase*pRaf1/(pRaf1 + Km10a);
end
Function_for_Raf1_dephosphorylation__RafPPtase_modifier__1 is "Function for Raf1 dephosphorylation (RafPPtase modifier)_1";

function Function_for_MEK_phosphorylation__pbRaf_modifier__1(Kcat11a, Km11a, MEK, pBRaf)
  Kcat11a*pBRaf*MEK/(MEK + Km11a);
end
Function_for_MEK_phosphorylation__pbRaf_modifier__1 is "Function for MEK phosphorylation (pbRaf modifier)_1";

function Function_for_MEK_dephosphorylation__PP2A_modifer__1(Kcat12, Km12, PP2A, pMEK)
  Kcat12*PP2A*pMEK/(pMEK + Km12);
end
Function_for_MEK_dephosphorylation__PP2A_modifer__1 is "Function for MEK dephosphorylation (PP2A modifer)_1";

function Function_for_ERK_dephosphorylation__PP2A_modifer__1(Kcat14, Km14, PP2A, pERK)
  Kcat14*PP2A*pERK/(pERK + Km14);
end
Function_for_ERK_dephosphorylation__PP2A_modifer__1 is "Function for ERK dephosphorylation (PP2A modifer)_1";

function Function_for_bRaf_phosphorylation__pRas_modifier__1(BRaf, Kcat16a, Km16a, pRas)
  Kcat16a*pRas*BRaf/(BRaf + Km16a);
end
Function_for_bRaf_phosphorylation__pRas_modifier__1 is "Function for bRaf phosphorylation (pRas modifier)_1";

function Function_for_PI3K_phosphorylation__pRas_modifier__1(Kcat19b, Km19b, PI3K, pRas)
  Kcat19b*pRas*PI3K/(PI3K + Km19b);
end
Function_for_PI3K_phosphorylation__pRas_modifier__1 is "Function for PI3K phosphorylation (pRas modifier)_1";

function Function_for_EGFR_binding_1(EGF, bEGFR, fEGFR, k21, k22)
  k21*EGF*fEGFR - k22*bEGFR;
end

function Function_for_Akt_phosphorylation__PIP3_modifier__1(Kcat22a, PIP3, Akt, Km22a)
  Kcat22a*PIP3*Akt/(Akt + Km22a);
end
Function_for_Akt_phosphorylation__PIP3_modifier__1 is "Function for Akt phosphorylation (PIP3 modifier)_1";

function Function_for_Akt_dephosphorylation_1(Kcat22b, pAkt, Km22b)
  Kcat22b*pAkt/(Km22b + pAkt);
end

function Function_for_Rap1_phosphorylation__pC3G_modifier__1(Kcat24, pC3G, Rap1, Km24)
  Kcat24*pC3G*Rap1/(Rap1 + Km24);
end
Function_for_Rap1_phosphorylation__pC3G_modifier__1 is "Function for Rap1 phosphorylation (pC3G modifier)_1";

function Function_for_C3G_phosphorylation__boundEGFR_modifier__1(Kcat23a, bEGFR, C3G, Km23a)
  Kcat23a*bEGFR*C3G/(C3G + Km23a);
end
Function_for_C3G_phosphorylation__boundEGFR_modifier__1 is "Function for C3G phosphorylation (boundEGFR modifier)_1";

function Function_for_Rap1_dephosphorylation__Rap1_GAP_modifer__1(Kcat25, Rap1Gap, pRap1, Km25)
  Kcat25*Rap1Gap*pRap1/(pRap1 + Km25);
end
Function_for_Rap1_dephosphorylation__Rap1_GAP_modifer__1 is "Function for Rap1 dephosphorylation (Rap1_GAP modifer)_1";

function Function_for_PI3K_phosphorylation__boundEGFR_modifier__1(Kcat19a, Km19a, PI3K, bEGFR)
  Kcat19a*bEGFR*PI3K/(PI3K + Km19a);
end
Function_for_PI3K_phosphorylation__boundEGFR_modifier__1 is "Function for PI3K phosphorylation (boundEGFR modifier)_1";

function Function_for_PKCD_synthesis_1(GSK3b, k1, k2, PKCD_degraded)
  k1*PKCD_degraded/(k2*GSK3b);
end

function Function_for_PIP3_dephosphorylated_to_PIP2_1(Kcat21, PTEN, PIP3, Km21)
  Kcat21*PTEN*PIP3/(PIP3 + Km21);
end

function Function_for_P90Rsk_phosphorylation__pERK_modifier__1(Kcat18b, Km18b, P90Rsk, pERK)
  Kcat18b*pERK*P90Rsk/(P90Rsk + Km18b);
end
Function_for_P90Rsk_phosphorylation__pERK_modifier__1 is "Function for P90Rsk phosphorylation (pERK modifier)_1";

function Function_for_PI3K_dephosphorylation(k19c, pPI3K)
  k19c*pPI3K;
end

function Function_for_PKCD_degradation_1(k26b, PKCD)
  k26b*PKCD;
end

function Function_for_GSK3b_phosphorylation__pERK_modifier__1(Kcat27a, GSK3B, pERK, k2)
  Kcat27a*GSK3B*k2*(pERK + 1);
end
Function_for_GSK3b_phosphorylation__pERK_modifier__1 is "Function for GSK3b phosphorylation (pERK modifier)_1";

function Function_for_GSK3b_phosphorylation__pAkt_modifier__1(Kcat27b, GSK3B, pAkt, k2)
  Kcat27b*GSK3B*k2*(pAkt + 1);
end
Function_for_GSK3b_phosphorylation__pAkt_modifier__1 is "Function for GSK3b phosphorylation (pAkt modifier)_1";

function Function_for_RKIP_dephosphorylation_1(pRKIP, V15b)
  V15b*pRKIP;
end

function Function_for_bRaf_phosphorylation__pRap1_modifier__1(BRaf, Kcat16b, Km16b, pRap1)
  Kcat16b*pRap1*BRaf/(BRaf + Km16b);
end
Function_for_bRaf_phosphorylation__pRap1_modifier__1 is "Function for bRaf phosphorylation (pRap1 modifier)_1";

function Function_for_PIP2_phosphorylated_to_PIP3_1(Kcat20, Km20, PIP2, pPI3K)
  Kcat20*pPI3K*PIP2/(PIP2 + Km20);
end

function Function_for_Dsh_activation_1(k28, Dshi, W)
  k28*Dshi*W;
end

function Function_for_Dsh_deactivation_1(k29, Dsha)
  k29*Dsha;
end

function Function_for_X_synthesis(bCatenin_TCF, k1, X_degraded)
  k1*bCatenin_TCF*X_degraded;
end

function Function_for_RKIP_phosphorylation__pERK_modifier(pERK, RKIP, k15a)
  k15a*(pERK + 1)*RKIP;
end
Function_for_RKIP_phosphorylation__pERK_modifier is "Function for RKIP phosphorylation (pERK modifier)";

function Function_for_APC_Axin_GSK3b_complex_disassembly__Dsha_modifier__1(k30, Dsha, APCAxinGSK3B)
  k30*(Dsha + 1)*APCAxinGSK3B;
end
Function_for_APC_Axin_GSK3b_complex_disassembly__Dsha_modifier__1 is "Function for APC_Axin_GSK3b complex disassembly (Dsha modifier)_1";

function Function_for_Ras_dephosphorylation__Ras_Gap_modifier__1(Kcat8b, RasGap, pRas, Km8b)
  Kcat8b*RasGap*pRas/(pRas + Km8b);
end
Function_for_Ras_dephosphorylation__Ras_Gap_modifier__1 is "Function for Ras dephosphorylation (Ras_Gap modifier)_1";

function Function_for_bCatenin_TCF_complex_binding_1(k381, BCatenin, TCF, k382, TCFBCatenin)
  k381*BCatenin*TCF - k382*TCFBCatenin;
end

function Function_for_pAPC_pAxin_GSK3b_bCatenin_complex_formation(k341, pAPCpAxinGSK3B, BCatenin, k342, pAPCpAxinGSK3BBCatenin)
  k341*pAPCpAxinGSK3B*BCatenin - k342*pAPCpAxinGSK3BBCatenin;
end

function Function_for_SOS_dephosphorylation__pP90Rsk_modifier__1(Kcat6b, pP90Rsk, pSOS, Km6b)
  Kcat6b*pP90Rsk*pSOS/(pSOS + Km6b);
end
Function_for_SOS_dephosphorylation__pP90Rsk_modifier__1 is "Function for SOS dephosphorylation (pP90Rsk modifier)_1";

function Function_for_Ras_phosphorylation__pSOS_modifier__1(Kcat7, pSOS, Ras, Km7)
  Kcat7*pSOS*Ras/(Ras + Km7);
end
Function_for_Ras_phosphorylation__pSOS_modifier__1 is "Function for Ras phosphorylation (pSOS modifier)_1";

function Function_for_Raf1_phosphorylation__X_modifier__1(k9b, W, X, Raf1, Km9b)
  k9b*W*X*Raf1/(Km9b + Raf1);
end
Function_for_Raf1_phosphorylation__X_modifier__1 is "Function for Raf1 phosphorylation (X modifier)_1";

function Function_for_SOS_phosphorylation__PKCD__bEGFR_and_pERK_modifier(k53, bEGFR, k52, PKCD, k51, SOS, pERK, k54)
  k53*bEGFR*k52*PKCD*k51*SOS/(1 + pERK/k54);
end
Function_for_SOS_phosphorylation__PKCD__bEGFR_and_pERK_modifier is "Function for SOS phosphorylation (PKCD, bEGFR and pERK modifier)";

function Function_for_P90Rsk_dephosphorylation(k18a, pP90Rsk)
  k18a*pP90Rsk;
end

function Function_for_Raf1_phosphorylation__pRas_modifier__1(Kcat9a, pRas, Raf1, Km9a)
  Kcat9a*pRas*Raf1/(Raf1 + Km9a);
end
Function_for_Raf1_phosphorylation__pRas_modifier__1 is "Function for Raf1 phosphorylation (pRas modifier)_1";

function Function_for_bRaf_dephosphorylation_1(Kcat17a, RafPPtase, pBRaf, Km17a)
  Kcat17a*RafPPtase*pBRaf/(Km17a + RafPPtase);
end

function Function_for_APC_and_Axin_phosphorylation__in_compound__1(k32a, APCAxinGSK3B)
  k32a*APCAxinGSK3B;
end
Function_for_APC_and_Axin_phosphorylation__in_compound__1 is "Function for APC and Axin phosphorylation (in compound)_1";

function Function_for_bRaf_dephosphorylation_2(Kcat17b, pBRaf, pAkt, Km17b)
  Kcat17b*pBRaf*pAkt/(Km17b + pBRaf);
end

function Function_for_bCatenin_phosphorylation__in_compound(k35, pAPCpAxinGSK3BBCatenin)
  k35*pAPCpAxinGSK3BBCatenin;
end
Function_for_bCatenin_phosphorylation__in_compound is "Function for bCatenin phosphorylation (in compound)";

model Padala2017__ERK__PI3K_Akt_and_Wnt_signalling_network__normal()
  // Padala2017- ERK, PI3K/Akt and Wnt signalling network (normal)
  // Edits made:
  // V1: Removed species "null" //
  // V2: Changed quantity unit from mol to nmol // Changed compartment volume from 1l to 1e-12l // Changed Axin degradation sign (from negative to positive) // Changed Axin degradation reaction to mass action law reaction //
  // Introduced Ras degradation reaction (mass action law)
  // V3: Changed Axin degradation (normalized to Cell Volume) // Changed reaction for EGFR dephosphorylation from V1/Cell to ((k1*S)-(k2*P))/Cell with S=pEGFR and P=freeEGFR // Changed Ras synthesis_1 function from V8a/Cell to (k2*P)/Cell // Changed bCatenin synthesis from V37b/Cell to (k1*P)/Cell with P=bCatenin // Changed function for bCatenin degradation (normalized to Cell Volume)
  // V4: removed normalization to cell volume // Changed Ras synthesis reaction from constant flux to V8a*Ras // Changed freeEGFR degradation reaction from default k value to k3 // Changed bCatenin degradation reaction from default k value to k37c // Changed reaction "APC and Axin phosphorylation (in compound)" to k32a*APCAxinGSK3B // Added function for APC_Axin_GSK3b complex formation (see original version) // Changed Axin degradation reaction from default k value to k33b // Changed bCatenin degradation reaction from constant flux to k37c*bCatenin (THIS CAUSES THE TIMECOURSE TO CRASH --> therefore I left the default k value (0.1 l/s))
  // V5: Function for EGFR dephosphorylation removed (pEGFR had no function for the signaling in this model) //
  // V6: established freeEGFR synthesis reaction with same constant as in degradation reaction. // Added EGF degradation reaction with arbitrary k = 1 l/s to mimick a quick, transient EGF stimulation
  // V7: removed reactions: freeEGFR synthesis, freeEGFR degradation, boundEGFR degradation
  // V9: Changed function for P90Rsk phosphorylation (pERK modifier) by specifying pERK as modifier //
  // V10: Changed all functions with indicated modifiers by specifying their modifiers
  // V11: Changed function for SOS phosphorylation (PKCD, pERK and boundEGFR) from (k51*bEGFR+k52+k53*PKCD)/(1+pERK/k54) to (k53*bEGFR*k52*PKCD*k51*SOS)/(1+(pERK/k54)) // Removed Ras degradation and synthesis reactions (because with them, [Ras] quickly reaches 0 even in the absence of EGF)
  // V12: Edited "Function for Dsh activation_1" by specifying W as modifier // Defined W as Species (before Global quantity)
  // V13: Wnt degradation reaction removed // changed pbCatenin degradation to pbCatenin dephosphorylation (pbCatenin -> bCatenin) // Changed value for constant of synthesis reaction to have the same value (V37b) as the degradation reaction
  // V14: Made "bCatenin phosphorylation (in compound)" irreversible (phosphorylation reactions are usually irreversible)
  // V15: remove GSK3B synthesis rections (makes no sense that RKIP converts to GSK3B) / also removed RKIP degradation reaction (why should RKIP be degraded) // changed "Function for RKIP phosphorylation (pERK modifier)_1" by using the same function like C3G phosphorylation (with different substrate and modifier).
  // V16: Changed initial concentration of pRKIP from 0.8619 to 0 (otherwise the RKIP is phosphorylated without stimulus (EGF))
  // V17: removed "GSK3b dephosphorylation" reaction (caused dephosphorylation of pGSK3B independent of any stimulus)
  // V18: removed Axin synthesis and degradation reactions // made Axin_APC assembly dependent on Dshi (only if W activates Dsh, Axin_APC assembly is impaired)
  // V19: removed APC_bCatenin and belonging reaction and function (APC_bCatenin has no function in modell)
  // V20: removed bCatenin synthesis and degradation reactions
  // V21: Introduced new PKCD synthesis (inhibited by GSK3B) and degradation reactions
  // V22: TO DO: - check, which reactions are running without stimulus? - Figure out how to deal with X
  // V24: edited "Function for GSK3b phosphorylation (pERK modifier)_1" (function now does not equal zero any more and I added a constant term to pERK concentration)
  // V25: made X synthesis dependent on bCatenin_TCF
  // V26: Introduced APC_Axin_GSK3b formation reaction
  // V29: removed APC and Axin // adjusted constants of X synthesis/degradation
  // &amp;amp;amp;amp;amp;amp;amp;amp;amp;amp;amp;amp;amp;amp;amp;amp;amp;amp;amp;amp;amp;amp;amp;amp;amp;amp;amp;amp;amp;amp;amp;amp;amp;amp;amp;amp;amp;amp;amp;amp;amp;amp;amp;amp;amp;amp;amp;amp;amp;amp;lt;body xmlns="http://www.w3.org/1999/xhtml">
  // &amp;amp;amp;amp;amp;amp;amp;amp;amp;amp;amp;amp;amp;amp;amp;amp;amp;amp;amp;amp;amp;amp;amp;amp;amp;amp;amp;amp;amp;amp;amp;amp;amp;amp;amp;amp;amp;amp;amp;amp;amp;amp;amp;amp;amp;amp;amp;amp;amp;amp;lt;div class="dc:title">Padala2017- ERK, PI3K/Akt and Wnt signalling
  // network (normal)&amp;amp;amp;amp;amp;amp;amp;amp;amp;amp;amp;amp;amp;amp;amp;amp;amp;amp;amp;amp;amp;amp;amp;amp;amp;amp;amp;amp;amp;amp;amp;amp;amp;amp;amp;amp;amp;amp;amp;amp;amp;amp;amp;amp;amp;amp;amp;amp;amp;amp;lt;/div>
  // &amp;amp;amp;amp;amp;amp;amp;amp;amp;amp;amp;amp;amp;amp;amp;amp;amp;amp;amp;amp;amp;amp;amp;amp;amp;amp;amp;amp;amp;amp;amp;amp;amp;amp;amp;amp;amp;amp;amp;amp;amp;amp;amp;amp;amp;amp;amp;amp;amp;amp;lt;div class="dc:description">Crosstalk model of the ERK, Wnt and Akt
  // signalling pathways under normal condition.&amp;amp;amp;amp;amp;amp;amp;amp;amp;amp;amp;amp;amp;amp;amp;amp;amp;amp;amp;amp;amp;amp;amp;amp;amp;amp;amp;amp;amp;amp;amp;amp;amp;amp;amp;amp;amp;amp;amp;amp;amp;amp;amp;amp;amp;amp;amp;amp;amp;amp;lt;/div>
  // &amp;amp;amp;amp;amp;amp;amp;amp;amp;amp;amp;amp;amp;amp;amp;amp;amp;amp;amp;amp;amp;amp;amp;amp;amp;amp;amp;amp;amp;amp;amp;amp;amp;amp;amp;amp;amp;amp;amp;amp;amp;amp;amp;amp;amp;amp;amp;amp;amp;amp;lt;div class="dc:bibliographicCitation">
  // &amp;amp;amp;amp;amp;amp;amp;amp;amp;amp;amp;amp;amp;amp;amp;amp;amp;amp;amp;amp;amp;amp;amp;amp;amp;amp;amp;amp;amp;amp;amp;amp;amp;amp;amp;amp;amp;amp;amp;amp;amp;amp;amp;amp;amp;amp;amp;amp;amp;amp;lt;p>This model is described in the article:&amp;amp;amp;amp;amp;amp;amp;amp;amp;amp;amp;amp;amp;amp;amp;amp;amp;amp;amp;amp;amp;amp;amp;amp;amp;amp;amp;amp;amp;amp;amp;amp;amp;amp;amp;amp;amp;amp;amp;amp;amp;amp;amp;amp;amp;amp;amp;amp;amp;amp;lt;/p>
  // &amp;amp;amp;amp;amp;amp;amp;amp;amp;amp;amp;amp;amp;amp;amp;amp;amp;amp;amp;amp;amp;amp;amp;amp;amp;amp;amp;amp;amp;amp;amp;amp;amp;amp;amp;amp;amp;amp;amp;amp;amp;amp;amp;amp;amp;amp;amp;amp;amp;amp;lt;div class="bibo:title">
  // &amp;amp;amp;amp;amp;amp;amp;amp;amp;amp;amp;amp;amp;amp;amp;amp;amp;amp;amp;amp;amp;amp;amp;amp;amp;amp;amp;amp;amp;amp;amp;amp;amp;amp;amp;amp;amp;amp;amp;amp;amp;amp;amp;amp;amp;amp;amp;amp;amp;amp;lt;a href="http://identifiers.org/pubmed/28367561" title="Access to this publication">Cancerous perturbations
  // within the ERK, PI3K/Akt, and Wnt/?-catenin signaling network
  // constitutively activate inter-pathway positive feedback
  // loops.&amp;amp;amp;amp;amp;amp;amp;amp;amp;amp;amp;amp;amp;amp;amp;amp;amp;amp;amp;amp;amp;amp;amp;amp;amp;amp;amp;amp;amp;amp;amp;amp;amp;amp;amp;amp;amp;amp;amp;amp;amp;amp;amp;amp;amp;amp;amp;amp;amp;amp;lt;/a>
  // &amp;amp;amp;amp;amp;amp;amp;amp;amp;amp;amp;amp;amp;amp;amp;amp;amp;amp;amp;amp;amp;amp;amp;amp;amp;amp;amp;amp;amp;amp;amp;amp;amp;amp;amp;amp;amp;amp;amp;amp;amp;amp;amp;amp;amp;amp;amp;amp;amp;amp;lt;/div>
  // &amp;amp;amp;amp;amp;amp;amp;amp;amp;amp;amp;amp;amp;amp;amp;amp;amp;amp;amp;amp;amp;amp;amp;amp;amp;amp;amp;amp;amp;amp;amp;amp;amp;amp;amp;amp;amp;amp;amp;amp;amp;amp;amp;amp;amp;amp;amp;amp;amp;amp;lt;div class="bibo:authorList">Padala RR, Karnawat R, Viswanathan
  // SB, Thakkar AV, Das AB.&amp;amp;amp;amp;amp;amp;amp;amp;amp;amp;amp;amp;amp;amp;amp;amp;amp;amp;amp;amp;amp;amp;amp;amp;amp;amp;amp;amp;amp;amp;amp;amp;amp;amp;amp;amp;amp;amp;amp;amp;amp;amp;amp;amp;amp;amp;amp;amp;amp;amp;lt;/div>
  // &amp;amp;amp;amp;amp;amp;amp;amp;amp;amp;amp;amp;amp;amp;amp;amp;amp;amp;amp;amp;amp;amp;amp;amp;amp;amp;amp;amp;amp;amp;amp;amp;amp;amp;amp;amp;amp;amp;amp;amp;amp;amp;amp;amp;amp;amp;amp;amp;amp;amp;lt;div class="bibo:Journal">Mol Biosyst 2017 May; 13(5):
  // 830-840&amp;amp;amp;amp;amp;amp;amp;amp;amp;amp;amp;amp;amp;amp;amp;amp;amp;amp;amp;amp;amp;amp;amp;amp;amp;amp;amp;amp;amp;amp;amp;amp;amp;amp;amp;amp;amp;amp;amp;amp;amp;amp;amp;amp;amp;amp;amp;amp;amp;amp;lt;/div>
  // &amp;amp;amp;amp;amp;amp;amp;amp;amp;amp;amp;amp;amp;amp;amp;amp;amp;amp;amp;amp;amp;amp;amp;amp;amp;amp;amp;amp;amp;amp;amp;amp;amp;amp;amp;amp;amp;amp;amp;amp;amp;amp;amp;amp;amp;amp;amp;amp;amp;amp;lt;p>Abstract:&amp;amp;amp;amp;amp;amp;amp;amp;amp;amp;amp;amp;amp;amp;amp;amp;amp;amp;amp;amp;amp;amp;amp;amp;amp;amp;amp;amp;amp;amp;amp;amp;amp;amp;amp;amp;amp;amp;amp;amp;amp;amp;amp;amp;amp;amp;amp;amp;amp;amp;lt;/p>
  // &amp;amp;amp;amp;amp;amp;amp;amp;amp;amp;amp;amp;amp;amp;amp;amp;amp;amp;amp;amp;amp;amp;amp;amp;amp;amp;amp;amp;amp;amp;amp;amp;amp;amp;amp;amp;amp;amp;amp;amp;amp;amp;amp;amp;amp;amp;amp;amp;amp;amp;lt;div class="bibo:abstract">
  // &amp;amp;amp;amp;amp;amp;amp;amp;amp;amp;amp;amp;amp;amp;amp;amp;amp;amp;amp;amp;amp;amp;amp;amp;amp;amp;amp;amp;amp;amp;amp;amp;amp;amp;amp;amp;amp;amp;amp;amp;amp;amp;amp;amp;amp;amp;amp;amp;amp;amp;lt;p>Perturbations in molecular signaling pathways are a result
  // of genetic or epigenetic alterations, which may lead to
  // malignant transformation of cells. Despite cellular robustness,
  // specific genetic or epigenetic changes of any gene can trigger
  // a cascade of failures, which result in the malfunctioning of
  // cell signaling pathways and lead to cancer phenotypes. The
  // extent of cellular robustness has a link with the architecture
  // of the network such as feedback and feedforward loops.
  // Perturbation in components within feedback loops causes a
  // transition from a regulated to a persistently activated state
  // and results in uncontrolled cell growth. This work represents
  // the mathematical and quantitative modeling of ERK, PI3K/Akt,
  // and Wnt/?-catenin signaling crosstalk to show the dynamics of
  // signaling responses during genetic and epigenetic changes in
  // cancer. ERK, PI3K/Akt, and Wnt/?-catenin signaling crosstalk
  // networks include both intra and inter-pathway feedback loops
  // which function in a controlled fashion in a healthy cell. Our
  // results show that cancerous perturbations of components such as
  // EGFR, Ras, B-Raf, PTEN, and components of the destruction
  // complex cause extreme fragility in the network and
  // constitutively activate inter-pathway positive feedback loops.
  // We observed that the aberrant signaling response due to the
  // failure of specific network components is transmitted
  // throughout the network via crosstalk, generating an additive
  // effect on cancer growth and proliferation.&amp;amp;amp;amp;amp;amp;amp;amp;amp;amp;amp;amp;amp;amp;amp;amp;amp;amp;amp;amp;amp;amp;amp;amp;amp;amp;amp;amp;amp;amp;amp;amp;amp;amp;amp;amp;amp;amp;amp;amp;amp;amp;amp;amp;amp;amp;amp;amp;amp;amp;lt;/p>
  // &amp;amp;amp;amp;amp;amp;amp;amp;amp;amp;amp;amp;amp;amp;amp;amp;amp;amp;amp;amp;amp;amp;amp;amp;amp;amp;amp;amp;amp;amp;amp;amp;amp;amp;amp;amp;amp;amp;amp;amp;amp;amp;amp;amp;amp;amp;amp;amp;amp;amp;lt;/div>
  // &amp;amp;amp;amp;amp;amp;amp;amp;amp;amp;amp;amp;amp;amp;amp;amp;amp;amp;amp;amp;amp;amp;amp;amp;amp;amp;amp;amp;amp;amp;amp;amp;amp;amp;amp;amp;amp;amp;amp;amp;amp;amp;amp;amp;amp;amp;amp;amp;amp;amp;lt;/div>
  // &amp;amp;amp;amp;amp;amp;amp;amp;amp;amp;amp;amp;amp;amp;amp;amp;amp;amp;amp;amp;amp;amp;amp;amp;amp;amp;amp;amp;amp;amp;amp;amp;amp;amp;amp;amp;amp;amp;amp;amp;amp;amp;amp;amp;amp;amp;amp;amp;amp;amp;lt;div class="dc:publisher">
  // &amp;amp;amp;amp;amp;amp;amp;amp;amp;amp;amp;amp;amp;amp;amp;amp;amp;amp;amp;amp;amp;amp;amp;amp;amp;amp;amp;amp;amp;amp;amp;amp;amp;amp;amp;amp;amp;amp;amp;amp;amp;amp;amp;amp;amp;amp;amp;amp;amp;amp;lt;p>This model is hosted on
  // &amp;amp;amp;amp;amp;amp;amp;amp;amp;amp;amp;amp;amp;amp;amp;amp;amp;amp;amp;amp;amp;amp;amp;amp;amp;amp;amp;amp;amp;amp;amp;amp;amp;amp;amp;amp;amp;amp;amp;amp;amp;amp;amp;amp;amp;amp;amp;amp;amp;amp;lt;a href="http://www.ebi.ac.uk/biomodels/">BioModels Database&amp;amp;amp;amp;amp;amp;amp;amp;amp;amp;amp;amp;amp;amp;amp;amp;amp;amp;amp;amp;amp;amp;amp;amp;amp;amp;amp;amp;amp;amp;amp;amp;amp;amp;amp;amp;amp;amp;amp;amp;amp;amp;amp;amp;amp;amp;amp;amp;amp;amp;lt;/a>
  // and identified by:
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  // &amp;amp;amp;amp;amp;amp;amp;amp;amp;amp;amp;amp;amp;amp;amp;amp;amp;amp;amp;amp;amp;amp;amp;amp;amp;amp;amp;amp;amp;amp;amp;amp;amp;amp;amp;amp;amp;amp;amp;amp;amp;amp;amp;amp;amp;amp;amp;amp;amp;amp;lt;p>To cite BioModels Database, please use:
  // &amp;amp;amp;amp;amp;amp;amp;amp;amp;amp;amp;amp;amp;amp;amp;amp;amp;amp;amp;amp;amp;amp;amp;amp;amp;amp;amp;amp;amp;amp;amp;amp;amp;amp;amp;amp;amp;amp;amp;amp;amp;amp;amp;amp;amp;amp;amp;amp;amp;amp;lt;div class="dc:license">
  // &amp;amp;amp;amp;amp;amp;amp;amp;amp;amp;amp;amp;amp;amp;amp;amp;amp;amp;amp;amp;amp;amp;amp;amp;amp;amp;amp;amp;amp;amp;amp;amp;amp;amp;amp;amp;amp;amp;amp;amp;amp;amp;amp;amp;amp;amp;amp;amp;amp;amp;lt;p>To the extent possible under law, all copyright and related or
  // the public domain worldwide. Please refer to
  // &amp;amp;amp;amp;amp;amp;amp;amp;amp;amp;amp;amp;amp;amp;amp;amp;amp;amp;amp;amp;amp;amp;amp;amp;amp;amp;amp;amp;amp;amp;amp;amp;amp;amp;amp;amp;amp;amp;amp;amp;amp;amp;amp;amp;amp;amp;amp;amp;amp;amp;lt;a href="http://creativecommons.org/publicdomain/zero/1.0/" title="Access to: CC0 1.0 Universal (CC0 1.0), Public Domain Dedication">CC0
  // Public Domain Dedication&amp;amp;amp;amp;amp;amp;amp;amp;amp;amp;amp;amp;amp;amp;amp;amp;amp;amp;amp;amp;amp;amp;amp;amp;amp;amp;amp;amp;amp;amp;amp;amp;amp;amp;amp;amp;amp;amp;amp;amp;amp;amp;amp;amp;amp;amp;amp;amp;amp;amp;lt;/a> for more information.&amp;amp;amp;amp;amp;amp;amp;amp;amp;amp;amp;amp;amp;amp;amp;amp;amp;amp;amp;amp;amp;amp;amp;amp;amp;amp;amp;amp;amp;amp;amp;amp;amp;amp;amp;amp;amp;amp;amp;amp;amp;amp;amp;amp;amp;amp;amp;amp;amp;amp;lt;/p>
  // hasPart GO:0000165
  // hasPart kegg.pathway:map04010
  // hasPart kegg.pathway:map04310
  // hasPart kegg.pathway:map04151
  // biomodels.db:MODEL1708290005
  // biomodels.db:BIOMD0000000648

  // Compartments:
  compartment Cell = 1e-12;  // isVersionOf GO:0005623

  // Species:
  species APCAxin in Cell = 0.0015; APCAxin is "APC_Axin";  // hasPart uniprot:O15169; hasPart uniprot:P25054
  species APCAxinGSK3B in Cell = 0.01554513; APCAxinGSK3B is "APC_Axin_GSK3b";  // hasPart uniprot:P49841; hasPart uniprot:O15169; hasPart uniprot:P25054
  species Akt in Cell = 200;  // isVersionOf uniprot:P31749
  species BCatenin in Cell = 42.21084; BCatenin is "bCatenin";  // isVersionOf uniprot:P35222
  species BRaf in Cell = 200; BRaf is "bRaf";  // isVersionOf uniprot:P15056
  species C3G in Cell = 500;  // isVersionOf uniprot:Q13905
  species Dsha in Cell = 0;  // isVersionOf uniprot:O14640; hasProperty bao:0002007; hasProperty bao:0002007
  species Dshi in Cell = 100;  // isVersionOf uniprot:O14640
  species EGF in Cell = 300;  // isVersionOf uniprot:P01133
  species ERK in Cell = 260;  // isVersionOf uniprot:P27361
  species GSK3B in Cell = 49.137; GSK3B is "GSK3b";  // isVersionOf uniprot:P49841
  species MEK in Cell = 680;  // isVersionOf uniprot:Q02750
  species P90Rsk in Cell = 60;  // isVersionOf uniprot:Q15418
  species PI3K in Cell = 100;  // isVersionOf omit:0027264
  species PIP2 in Cell = 700;  // isVersionOf chebi:0018348
  species PIP3 in Cell = 0;  // isVersionOf chebi:0016618
  species PKCD in Cell = 0.2491467;  // isVersionOf uniprot:Q05655
  species PP2A in Cell = 240;  // isVersionOf uniprot:P67775
  species PTEN in Cell = 270;  // isVersionOf uniprot:P60484
  species RKIP in Cell = 20.909;  // isVersionOf uniprot:P30086
  species Raf1 in Cell = 100;  // isVersionOf uniprot:P04049
  species RafPPtase in Cell = 60;  // isVersionOf uniprot:P67775
  species Rap1 in Cell = 200;  // isVersionOf uniprot:P62834
  species Rap1Gap in Cell = 12; Rap1Gap is "Rap1_Gap";  // isVersionOf uniprot:P47736
  species Ras in Cell = 100;  // isVersionOf uniprot:P01112
  species RasGap in Cell = 100; RasGap is "Ras_Gap";  // isVersionOf uniprot:P20936
  species SOS in Cell = 100;  // isVersionOf uniprot:Q07889
  species TCF in Cell = 6.18738;  // isVersionOf uniprot:Q9UJU2
  species TCFBCatenin in Cell = 8.8121; TCFBCatenin is "bCatenin_TCF";  // hasPart uniprot:Q9UJU2; hasPart uniprot:P35222
  species X in Cell = 10.33414;
  species bEGFR in Cell = 0; bEGFR is "boundEGFR";  // hasPart uniprot:P01133; hasPart uniprot:P00533
  species fEGFR in Cell = 300; fEGFR is "freeEGFR";  // isVersionOf uniprot:P00533
  species pAPCpAxinGSK3B in Cell = 0.0153; pAPCpAxinGSK3B is "pAPC_pAxin_GSK3b";  // hasPart uniprot:P49841; hasPart uniprot:P25054; hasPart uniprot:O15169; hasProperty bao:0002007
  species pAPCpAxinGSK3BBCatenin in Cell = 0.002; pAPCpAxinGSK3BBCatenin is "pAPC_pAxin_GSK3b_bCatenin";  // hasPart uniprot:P35222; hasPart uniprot:O15169; hasPart uniprot:P49841; hasPart uniprot:P25054
  species pAPCpAxinGSK3BpBCatenin in Cell = 0.002; pAPCpAxinGSK3BpBCatenin is "pAPC_pAxin_GSK3b_pbCatenin";  // hasPart uniprot:P25054; hasPart uniprot:P35222; hasPart uniprot:O15169; hasPart uniprot:P49841
  species pAkt in Cell = 0;  // isVersionOf uniprot:P31749; hasProperty bao:0002007; hasProperty bao:0002007
  species pBCatenin in Cell = 0.989394; pBCatenin is "pbCatenin";  // isVersionOf uniprot:P35222; hasProperty bao:0002007; hasProperty bao:0002007
  species pBRaf in Cell = 0; pBRaf is "pbRaf";  // isVersionOf uniprot:P15056; hasProperty bao:0002007; hasProperty bao:0002007
  species pC3G in Cell = 0;  // isVersionOf uniprot:P01024; hasProperty bao:0002007; hasProperty bao:0002007
  species pERK in Cell = 0;  // isVersionOf uniprot:P28482; hasProperty bao:0002007; hasProperty bao:0002007
  species pGSK3B in Cell = 0.85544; pGSK3B is "pGSK3b";  // isVersionOf uniprot:P49841; hasProperty bao:0002007; hasProperty bao:0002007
  species pMEK in Cell = 0;  // isVersionOf uniprot:Q02750; hasProperty bao:0002007; hasProperty bao:0002007
  species pP90Rsk in Cell = 0;  // isVersionOf uniprot:Q15418; hasProperty bao:0002007; hasProperty bao:0002007
  species pPI3K in Cell = 0;  // isVersionOf omit:0027264; hasProperty bao:0002007; hasProperty bao:0002007
  species pRKIP in Cell = 0;  // isVersionOf uniprot:P30086; hasProperty bao:0002007; hasProperty bao:0002007
  species pRaf1 in Cell = 0;  // isVersionOf uniprot:P04049; hasProperty bao:0002007; hasProperty bao:0002007
  species pRap1 in Cell = 0;  // isVersionOf uniprot:P62834; hasProperty bao:0002007; hasProperty bao:0002007
  species pRas in Cell = 0;  // isVersionOf uniprot:P62070; hasProperty bao:0002007; hasProperty bao:0002007
  species pSOS in Cell = 0;  // isVersionOf uniprot:Q07889; hasProperty bao:0002007; hasProperty bao:0002007
  species null in Cell = 0;
  species W in Cell = 0;
  species PKCD_degraded in Cell = 0.2491467;
  species X_degraded in Cell = 10.263;
  species FRZ in Cell = 103;
  species bound_FRZ in Cell = 1;

  // Parameters:
  Kcat10a = 0.12633;
  Kcat10b = 15.1212;
  Kcat11a = 185.76;
  Kcat12 = 2.8324;
  Kcat13 = 9.8537;
  Kcat14 = 50;
  Kcat16a = 0.8841;
  Kcat16b = 0.8841;
  Kcat17a = 0.12633;
  Kcat17b = 15.1212;
  Kcat18b = 0.02137;
  Kcat19a = 10.6737;
  Kcat19b = 0.07711;
  Kcat20 = 4;
  Kcat21 = 5.5;
  Kcat22a = 0.33;
  Kcat22b = 48.667;
  Kcat23a = 694.73;
  Kcat24 = 32.344;
  Kcat25 = 1509.4;
  Kcat27a = 0.002;
  Kcat27b = 0.04596;
  Kcat27d = 0.01541;
  Kcat6b = 1611.97;
  Kcat7 = 32.644;
  Kcat8b = 1509.36;
  Kcat9a = 0.884096;
  Km10a = 1061.7;
  Km10b = 119355;
  Km11a = 4768400;
  Km12 = 518750;
  Km13 = 1007300;
  Km14 = 3496500;
  Km16a = 62645;
  Km16b = 62464.6;
  Km17a = 1061.71;
  Km17b = 119355;
  Km18b = 763523;
  Km19a = 184912;
  Km19b = 272056;
  Km20 = 4;
  Km21 = 0.08;
  Km22a = 100;
  Km22b = 100;
  Km23a = 6086100;
  Km24 = 35954.3;
  Km25 = 1432400;
  Km39 = 15;
  Km6b = 896896;
  Km7 = 35954.3;
  Km8b = 1432410;
  Km9a = 62464.6;
  Km9b = 15;
  V1 = 100;
  V15b = 4;
  V26a = 0.00154;
  V37b = 0.00705;
  V8a = 0.0717;
  k11b1 = 1.1167e-5;
  k11b2 = 120;
  k15a = 1.3;
  k15c = 0.00193;
  k18a = 0.005;
  k19c = 0.005;
  k21 = 2.18503e-5;
  k22 = 0.121008;
  k23b = 2.5;
  k26a = 20;
  k26b = 0.000385;
  k27c = 0.00015;
  k28 = 0.003;
  k29 = 0.003;
  k3 = 0.00125;
  k30 = 0.000833;
  k311 = 0.001515;
  k312 = 0.01515;
  k32a = 0.00445;
  k32b = 0.002217;
  k33a1 = 0.01667;
  k33a2 = 0.8333;
  k33b = 0.002783;
  k33c1 = 1.37e-6;
  k33c2 = 1.667e-8;
  k341 = 0.01667;
  k342 = 2;
  k35 = 3.433;
  k36 = 3.433;
  k37c = 4.283e-6;
  k381 = 0.01686518;
  k382 = 0.5;
  k39 = 0.01;
  k4 = 0.2;
  k40 = 0.00025;
  k41 = 0.00695;
  k51 = 0.003465;
  k52 = 3.85e-5;
  k53 = 0.00028833;
  k54 = 1.5;
  k6a = 2.5;
  k9b = 0.025;

  // Reactions:
  P90Rsk_dephosphorylation: pP90Rsk -> P90Rsk; Function_for_P90Rsk_dephosphorylation(k18a, pP90Rsk);
  PI3K_dephosphorylation: pPI3K -> PI3K; Function_for_PI3K_dephosphorylation(k19c, pPI3K);
  EGFR_binding: fEGFR + EGF => bEGFR; Function_for_EGFR_binding_1(fEGFR, bEGFR, EGF, k21, k22);
  PIP2_phosphorylated_to_PIP3: pPI3K + PIP2 -> pPI3K + PIP3; Function_for_PIP2_phosphorylated_to_PIP3_1(Kcat20, Km20, pPI3K, PIP2);
  PIP3_dephosphorylated_to_PIP2: PTEN + PIP3 -> PTEN + PIP2; Function_for_PIP3_dephosphorylated_to_PIP2_1(Kcat21, PTEN, PIP3, Km21);
  Akt_dephosphorylation: pAkt -> Akt; Function_for_Akt_dephosphorylation_1(Kcat22b, pAkt, Km22b);
  C3G_dephosphorylation: pC3G => C3G; C3G_dephosphorylation_k1*pC3G;
    C3G_dephosphorylation_k1 = 0.1;
  PKCD_degradation: PKCD => PKCD_degraded; Function_for_PKCD_degradation_1(PKCD_degradation_k26b, PKCD);
    PKCD_degradation_k26b = 0.020369;
  Dsh_deactivation: Dsha => Dshi; Function_for_Dsh_deactivation_1(k29, Dsha);
  APC_and_Axin_phosphorylation__in_compound: APCAxinGSK3B => pAPCpAxinGSK3B; Function_for_APC_and_Axin_phosphorylation__in_compound__1(k32a, APCAxinGSK3B); APC_and_Axin_phosphorylation__in_compound is "APC and Axin phosphorylation (in compound)";
  APC_and_Axin_dephosphorylation__in_compound: pAPCpAxinGSK3B => APCAxinGSK3B; k32a*pAPCpAxinGSK3B; APC_and_Axin_dephosphorylation__in_compound is "APC and Axin dephosphorylation (in compound)";
  pAPC_pAxin_GSK3b_pbCatenin_complex_disassembly: pAPCpAxinGSK3BpBCatenin => pBCatenin + pAPCpAxinGSK3B; k36*pAPCpAxinGSK3BpBCatenin;
  bCatenin_TCF_complex_bilding: TCF + BCatenin -> TCFBCatenin; Function_for_bCatenin_TCF_complex_binding_1(k381, TCF, BCatenin, k382, TCFBCatenin);
  pbCatenin_dephosphorylation: pBCatenin => BCatenin; k41*pBCatenin;
  P90Rsk_phosphorylation__pERK_modifier: pERK + P90Rsk -> pERK + pP90Rsk; Function_for_P90Rsk_phosphorylation__pERK_modifier__1(Kcat18b, Km18b, P90Rsk, pERK); P90Rsk_phosphorylation__pERK_modifier is "P90Rsk phosphorylation (pERK modifier)";
  Raf1_dephosphorylation__RafPPtase_modifier: RafPPtase + pRaf1 -> RafPPtase + Raf1; Function_for_Raf1_dephosphorylation__RafPPtase_modifier__1(Kcat10a, Km10a, RafPPtase, pRaf1); Raf1_dephosphorylation__RafPPtase_modifier is "Raf1 dephosphorylation (RafPPtase modifier)";
  Raf1_dephosphorylation__pAkt_modifier: pAkt + pRaf1 -> pAkt + Raf1; Function_for_Raf1_dephosphorylation__pAkt_modifier__1(Kcat10b, Km10b, pAkt, pRaf1); Raf1_dephosphorylation__pAkt_modifier is "Raf1 dephosphorylation (pAkt modifier)";
  MEK_phosphorylation__pbRaf_modifier: pBRaf + MEK -> pBRaf + pMEK; Function_for_MEK_phosphorylation__pbRaf_modifier__1(Kcat11a, Km11a, MEK, pBRaf); MEK_phosphorylation__pbRaf_modifier is "MEK phosphorylation (pbRaf modifier)";
  MEK_phosphorylation__pRaf1__pRKIP_and_RKIP_modifiers: pRKIP + pRaf1 + MEK -> pRKIP + pRaf1 + pMEK; Function_for_MEK_phosphorylation__pRaf1__pRKIP_and_RKIP_modifiers__1(MEK, RKIP, k11b1, k11b2, pRKIP, pRaf1); MEK_phosphorylation__pRaf1__pRKIP_and_RKIP_modifiers is "MEK phosphorylation (pRaf1, pRKIP and RKIP modifiers)";  // modifiers: RKIP
  ERK_phosphorylation__pMEK_modifier: pMEK + ERK -> pMEK + pERK; Function_for_ERK_phosphorylation__pMEK_modifier__1(pMEK, Kcat13, Km13, pMEK); ERK_phosphorylation__pMEK_modifier is "ERK phosphorylation (pMEK modifier)";
  bRaf_phosphorylation__pRas_modifier: pRas + BRaf -> pRas + pBRaf; Function_for_bRaf_phosphorylation__pRas_modifier__1(BRaf, Kcat16a, Km16a, pRas); bRaf_phosphorylation__pRas_modifier is "bRaf phosphorylation (pRas modifier)";
  bRaf_phosphorylation__pRap1_modifier: pRap1 + BRaf -> pRap1 + pBRaf; Function_for_bRaf_phosphorylation__pRap1_modifier__1(BRaf, Kcat16b, Km16b, pRap1); bRaf_phosphorylation__pRap1_modifier is "bRaf phosphorylation (pRap1 modifier)";
  PI3K_phosphorylation__boundEGFR_modifier: bEGFR + PI3K -> bEGFR + pPI3K; Function_for_PI3K_phosphorylation__boundEGFR_modifier__1(Kcat19a, Km19a, PI3K, bEGFR); PI3K_phosphorylation__boundEGFR_modifier is "PI3K phosphorylation (boundEGFR modifier)";
  PI3K_phosphorylation__pRas_modifier: PI3K -> pPI3K; Function_for_PI3K_phosphorylation__pRas_modifier__1(Kcat19b, Km19b, PI3K, pRas); PI3K_phosphorylation__pRas_modifier is "PI3K phosphorylation (pRas modifier)";  // modifiers: pRas
  Akt_phosphorylation__PIP3_modifier: PIP3 + Akt -> PIP3 + pAkt; Function_for_Akt_phosphorylation__PIP3_modifier__1(Kcat22a, PIP3, Akt, Km22a); Akt_phosphorylation__PIP3_modifier is "Akt phosphorylation (PIP3 modifier)";
  C3G_phosphorylation__boundEGFR_modifier: C3G => pC3G; Function_for_C3G_phosphorylation__boundEGFR_modifier__1(Kcat23a, bEGFR, C3G, Km23a); C3G_phosphorylation__boundEGFR_modifier is "C3G phosphorylation (boundEGFR modifier)";  // modifiers: bEGFR
  Rap1_phosphorylation__pC3G_modifier: pC3G + Rap1 -> pC3G + pRap1; Function_for_Rap1_phosphorylation__pC3G_modifier__1(Kcat24, pC3G, Rap1, Km24); Rap1_phosphorylation__pC3G_modifier is "Rap1 phosphorylation (pC3G modifier)";
  Ras_phosphorylation__pSOS_modifier: pSOS + Ras -> pSOS + pRas; Function_for_Ras_phosphorylation__pSOS_modifier__1(Kcat7, pSOS, Ras, Km7); Ras_phosphorylation__pSOS_modifier is "Ras phosphorylation (pSOS modifier)";
  Ras_dephosphorylation__Ras_Gap_modifier: RasGap + pRas -> RasGap + Ras; Function_for_Ras_dephosphorylation__Ras_Gap_modifier__1(Kcat8b, RasGap, pRas, Km8b); Ras_dephosphorylation__Ras_Gap_modifier is "Ras dephosphorylation (Ras_Gap modifier)";
  Raf1_phosphorylation__pRas_modifier: pRas + Raf1 -> pRas + pRaf1; Function_for_Raf1_phosphorylation__pRas_modifier__1(Kcat9a, pRas, Raf1, Km9a); Raf1_phosphorylation__pRas_modifier is "Raf1 phosphorylation (pRas modifier)";
  bRaf_dephosphorylation__RafPPtase_modifier: RafPPtase + pBRaf -> RafPPtase + BRaf; Function_for_bRaf_dephosphorylation_1(Kcat17a, RafPPtase, pBRaf, Km17a); bRaf_dephosphorylation__RafPPtase_modifier is "bRaf dephosphorylation (RafPPtase modifier)";
  bRaf_dephosphorylation__pAkt_modifier: pAkt + pBRaf -> pAkt + BRaf; Function_for_bRaf_dephosphorylation_2(Kcat17b, pBRaf, pAkt, Km17b); bRaf_dephosphorylation__pAkt_modifier is "bRaf dephosphorylation (pAkt modifier)";
  ERK_dephosphorylation__PP2A_modifer: pERK + PP2A -> ERK + PP2A; Function_for_ERK_dephosphorylation__PP2A_modifer__1(Kcat14, Km14, PP2A, pERK); ERK_dephosphorylation__PP2A_modifer is "ERK dephosphorylation (PP2A modifer)";
  MEK_dephosphorylation__PP2A_modifer: pMEK + PP2A -> MEK + PP2A; Function_for_MEK_dephosphorylation__PP2A_modifer__1(Kcat12, Km12, PP2A, pMEK); MEK_dephosphorylation__PP2A_modifer is "MEK dephosphorylation (PP2A modifer)";
  Rap1_dephosphorylation__Rap1_GAP_modifer: Rap1Gap + pRap1 -> Rap1Gap + Rap1; Function_for_Rap1_dephosphorylation__Rap1_GAP_modifer__1(Kcat25, Rap1Gap, pRap1, Km25); Rap1_dephosphorylation__Rap1_GAP_modifer is "Rap1 dephosphorylation (Rap1_GAP modifer)";
  SOS_phosphorylation__PKCD__bEGFR__pERK_modifier: SOS => pSOS; Function_for_SOS_phosphorylation__PKCD__bEGFR_and_pERK_modifier(SOS_phosphorylation__PKCD__bEGFR__pERK_modifier_k53, bEGFR, SOS_phosphorylation__PKCD__bEGFR__pERK_modifier_k52, PKCD, k51, SOS, pERK, k54); SOS_phosphorylation__PKCD__bEGFR__pERK_modifier is "SOS phosphorylation (PKCD, bEGFR, pERK modifier)";  // modifiers: bEGFR, PKCD, pERK
    SOS_phosphorylation__PKCD__bEGFR__pERK_modifier_k53 = 0.1; SOS_phosphorylation__PKCD__bEGFR__pERK_modifier_k52 = 0.1;
  Dsh_activation: Dshi => Dsha; Function_for_Dsh_activation_1(k28, Dshi, W);  // modifiers: W
  Raf1_phosphorylation__X_modifier: X + Raf1 -> X + pRaf1; Function_for_Raf1_phosphorylation__X_modifier__1(k9b, W, X, Raf1, Km9b); Raf1_phosphorylation__X_modifier is "Raf1 phosphorylation (X modifier)";  // modifiers: W
  bCatenin_phosphorylation__in_compound: pAPCpAxinGSK3BBCatenin => pAPCpAxinGSK3BpBCatenin; Function_for_bCatenin_phosphorylation__in_compound(k35, pAPCpAxinGSK3BBCatenin); bCatenin_phosphorylation__in_compound is "bCatenin phosphorylation (in compound)";
  RKIP_dephosphorylation: pRKIP => RKIP; Function_for_RKIP_dephosphorylation_1(pRKIP, V15b);
  RKIP_phosphorylation__pERK_modifier: RKIP => pRKIP; Function_for_RKIP_phosphorylation__pERK_modifier(pERK, RKIP, k15a); RKIP_phosphorylation__pERK_modifier is "RKIP phosphorylation (pERK modifier)";  // modifiers: pERK
  GSK3b_dephosphorylation: pGSK3B => GSK3B; GSK3b_dephosphorylation_k1*pGSK3B;
    GSK3b_dephosphorylation_k1 = 0.0369003;
  GSK3b_phosphorylation__pERK_modifier: pERK + GSK3B => ERK + pGSK3B; Function_for_GSK3b_phosphorylation__pERK_modifier__1(Kcat27a, GSK3B, pERK, GSK3b_phosphorylation__pERK_modifier_k2); GSK3b_phosphorylation__pERK_modifier is "GSK3b phosphorylation (pERK modifier)";
    GSK3b_phosphorylation__pERK_modifier_k2 = 0.05;
  GSK3b_phosphorylation__pAkt_modifier: pAkt + GSK3B => pAkt + pGSK3B; Function_for_GSK3b_phosphorylation__pAkt_modifier__1(Kcat27b, GSK3B, pAkt, GSK3b_phosphorylation__pAkt_modifier_k2); GSK3b_phosphorylation__pAkt_modifier is "GSK3b phosphorylation (pAkt modifier)";
    GSK3b_phosphorylation__pAkt_modifier_k2 = 0.01;
  SOS_dephosphorylation__pP90Rsk_modifier: pSOS => SOS; Function_for_SOS_dephosphorylation__pP90Rsk_modifier__1(Kcat6b, pP90Rsk, pSOS, Km6b); SOS_dephosphorylation__pP90Rsk_modifier is "SOS dephosphorylation (pP90Rsk modifier)";  // modifiers: pP90Rsk
  X_degradation: X => X_degraded; X_degradation_k1*X;
    X_degradation_k1 = 0.116405;
  APC_Axin_GSK3b_complex_formation: APCAxin + GSK3B => APCAxinGSK3B; APC_Axin_GSK3b_complex_formation_k1*APCAxin*GSK3B;
    APC_Axin_GSK3b_complex_formation_k1 = 4.2617;
  W_binding_to_FRZ: W + FRZ => bound_FRZ; W_binding_to_FRZ_k1*W*FRZ;
    W_binding_to_FRZ_k1 = 1e-7;
  APC_Axin_GSK3b_comples_disassembly__Dsha_modifier: APCAxinGSK3B => APCAxin + GSK3B; Function_for_APC_Axin_GSK3b_complex_disassembly__Dsha_modifier__1(APC_Axin_GSK3b_comples_disassembly__Dsha_modifier_k30, Dsha, APCAxinGSK3B); APC_Axin_GSK3b_comples_disassembly__Dsha_modifier is "APC_Axin_GSK3b comples disassembly (Dsha modifier)";  // modifiers: Dsha
    APC_Axin_GSK3b_comples_disassembly__Dsha_modifier_k30 = 20.6586;
  X_synthesis: X_degraded => X; Function_for_X_synthesis(TCFBCatenin, X_synthesis_k1, X_degraded);  // modifiers: TCFBCatenin
    X_synthesis_k1 = 0.0133428;
  bound_FRZ_internalisation: bound_FRZ => ; bound_FRZ_internalisation_k1*bound_FRZ;
    bound_FRZ_internalisation_k1 = 0.1;
  EGF_degradation: EGF => ; EGF_degradation_k1*EGF;
    EGF_degradation_k1 = 1e-5;
  pAPC_pAxin_GSK3b_bCatenin_complex_formation: BCatenin + pAPCpAxinGSK3B => pAPCpAxinGSK3BBCatenin; Function_for_pAPC_pAxin_GSK3b_bCatenin_complex_formation(k341, BCatenin, pAPCpAxinGSK3B, k342, pAPCpAxinGSK3BBCatenin);
  bCatenin_TCF_disassembly: TCFBCatenin => BCatenin + TCF; Cell*bCatenin_TCF_disassembly_k1*TCFBCatenin;
    bCatenin_TCF_disassembly_k1 = 0.0809096;
  PKCD_synthesis: PKCD_degraded => PKCD; Function_for_PKCD_synthesis_1(GSK3B, PKCD_synthesis_k1, PKCD_synthesis_k2, PKCD_degraded);  // modifiers: GSK3B
    PKCD_synthesis_k1 = 0.1; PKCD_synthesis_k2 = 0.1;

  // Unit definitions:
  unit length = metre;
  unit area = metre^2;
  unit volume = litre;
  unit time = second;
  unit substance = 1e-9 mole;
end
